units          metal
boundary       p p p
atom_style     atomic

read_data      ../../../files/sample_monoclinic_HfO2_DATA

neighbor       0.5 bin
neigh_modify   every 1 delay 0 check yes

pair_style     pod
pair_coeff     * * simple_3body_hfo2_param.pod simple_3body_HfO2_coefficients.pod Hf O

thermo       1
thermo_style custom step temp pe ke etotal press

fix eprint all print 100 "$(step) $(pe)" file rerun_pe.dat

dump           forces all custom 100 rerun_dump_forces.custom id element x y z fx fy fz
dump_modify    forces element Hf O sort id format line "%4d %2s %22.17f %22.17f %22.17f %22.17f %22.17f %22.17f"

rerun dump_monoclinic_hfo2_firstimage.atom dump x y z
