# Localized thermostat simulation (mode 3)
# Generated by localized_thermostat

units metal
atom_style atomic
boundary p p p

read_data thermostat.data

neighbor 2.0 bin
neigh_modify every 1 delay 0 check yes

pair_style pod
pair_coeff * * HfO2_param.pod HfO2_coefficients.pod Hf O

# --- Group definitions (hybrid: ID-based mobile, frozen = rest) ---
group mobile id 809 1093 1096 1097 1098 1100 1101 1104 1129 1130 1132 1133 1134 1135 1136 1137 1138 1140 1141 1165 1166 1169 1170 1172 1173 1174 1384 1385 1388 1392 1417 1418 1419 1420 1421 1422 1423 1424 1425 1426 1427 1428 1429 1432 1449 1450 1451 1452 1453 1454 1455 1456 1457 1458 1459 1460 1461 1462 1463 1464 1465 1466 1468 1485 1486 1489 1490 1491 1492 1493 1494 1495 1496 1497 1498 1499 1500 1501 1525 1526 1529 1530 1533 1534 1705 1706 1707 1708 1709 1710 1711 1712 1713 1715 1716 1720 1737 1738 1739 1740 1741 1742 1743 1744 1745 1746 1747 1748 1749 1750 1751 1752 1753 1754 1755 1756 1773 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
group frozen subtract all mobile

# --- Region definitions ---
region reg_core sphere 24.14 25.07 22.58 5.0 side in
region reg_shell1_inner sphere 24.14 25.07 22.58 5.0 side out
region reg_shell1_outer sphere 24.14 25.07 22.58 7.5 side in
region reg_shell1 intersect 2 reg_shell1_inner reg_shell1_outer
region reg_shell2_inner sphere 24.14 25.07 22.58 7.5 side out
region reg_shell2_outer sphere 24.14 25.07 22.58 10.0 side in
region reg_shell2 intersect 2 reg_shell2_inner reg_shell2_outer
region reg_shell3_inner sphere 24.14 25.07 22.58 10.0 side out
region reg_shell3_outer sphere 24.14 25.07 22.58 12.5 side in
region reg_shell3 intersect 2 reg_shell3_inner reg_shell3_outer
region reg_shell4_inner sphere 24.14 25.07 22.58 12.5 side out
region reg_shell4_outer sphere 24.14 25.07 22.58 15.0 side in
region reg_shell4 intersect 2 reg_shell4_inner reg_shell4_outer

# --- Dynamic groups (re-evaluated every N steps) ---
group dyn_core dynamic mobile region reg_core every 100
group dyn_shell1 dynamic mobile region reg_shell1 every 100
group dyn_shell2 dynamic mobile region reg_shell2 every 100
group dyn_shell3 dynamic mobile region reg_shell3 every 100
group dyn_shell4 dynamic mobile region reg_shell4 every 100

# --- Frozen atoms ---
velocity frozen set 0.0 0.0 0.0
fix freeze frozen setforce 0.0 0.0 0.0
# neigh_modify exclude omitted (crashes with pair_style pod)

# --- Time integration (must exist before run 0) ---
fix integ mobile nve
timestep 0.001

# --- Populate dynamic groups via run 0 ---
run 0

# --- Per-zone velocity initialization ---
velocity dyn_core create 500.0 38500 dist gaussian
velocity dyn_shell1 create 450.0 38501 dist gaussian
velocity dyn_shell2 create 350.0 38502 dist gaussian
velocity dyn_shell3 create 250.0 38503 dist gaussian
velocity dyn_shell4 create 150.0 38504 dist gaussian

# --- Langevin thermostats ---
fix lang_core dyn_core langevin 500.0 500.0 0.1 38600
fix lang_dyn_shell1 dyn_shell1 langevin 450.0 450.0 0.1 38601
fix lang_dyn_shell2 dyn_shell2 langevin 350.0 350.0 0.1 38602
fix lang_dyn_shell3 dyn_shell3 langevin 250.0 250.0 0.1 38603
fix lang_dyn_shell4 dyn_shell4 langevin 150.0 150.0 0.1 38604

# --- Diagnostics ---
shell mkdir diagnostics
compute ke_per_atom all ke/atom
dump diag_traj mobile custom 500 diagnostics/ke_trajectory.lammpstrj id type x y z c_ke_per_atom
dump_modify diag_traj sort id format line "%d %d %14.8f %14.8f %14.8f %14.8e"

# --- Per-zone temperature computes ---
compute temp_core dyn_core temp
compute temp_dyn_shell1 dyn_shell1 temp
compute temp_dyn_shell2 dyn_shell2 temp
compute temp_dyn_shell3 dyn_shell3 temp
compute temp_dyn_shell4 dyn_shell4 temp

thermo 100
thermo_style custom step temp c_temp_core c_temp_dyn_shell1 c_temp_dyn_shell2 c_temp_dyn_shell3 c_temp_dyn_shell4 etotal pe ke press

run 5000
